// COMSOL Multiphysics 5.6.0.401 model "disk.mph"
// Outline of the model tree

Parameters
  disk_t = 500[nm]
  pedestal_h = 2[um]
  pedestal_r = 50.0[um]

Common definitions
  mpf1: ParticipationFactors
  fsd1: FreeShapeDomain on all domains

Geometry
  geom1 "Geometry 1" (3D, length unit µm)
    imp1: Import
      type = ecad
      filename = layouts\sdisk\layouts\sdisk35.gds
      ecadtype = gds
      fileunit = µm
      layername = LAYER1
      height = 0
      elevation = 0
      importlayer = on
      layerprop = {LAYER1, Metal}
    ext1: Extrude "Extrude Disk" | extrudefrom = faces; inputface = selection imp1_LAYER1.bnd; distance = disk_t
    wp1: WorkPlane "Pedestal" | unite = on
      c1: Circle | r = pedestal_r
    ext4: Extrude "Extrude Pedestal"
      extrudefrom = faces
      workplane = wp1
      inputface = wp1.c1 boundaries 1
      distance = -pedestal_h
    fin: Finalize "Form Union"

Materials
  mat1: Common "Silicon" on domains 1
    def "Basic"
      relpermeability = 1
      electricconductivity = 1e-12[S/m]
      thermalexpansioncoefficient = 2.6e-6[1/K]
      heatcapacity = 700[J/(kg*K)]
      relpermittivity = 11.7
      density = 2329[kg/m^3]
      thermalconductivity = 130[W/(m*K)]
    Enu "Young's modulus and Poisson's ratio"
      youngsmodulus = 170e9[Pa]
      poissonsratio = 0.28
    RefractiveIndex
      n = 3.48
      ki = 0
  mat3: Common "SiO2" on domains 2
    def "Basic"
      youngsmodulus = 70e9
      poissonsratio = 0.21
      density = 2180

Physics
  solid: SolidMechanics on all domains
    dependent variable u = {u, v, w}
    lemm1: LinearElasticModel "Linear Elastic Material 1" (default)
      dmp1: Damping "Si damping" (disabled) on no domains
        DampingType = IsotropicLossFactor
        eta_s_mat = userdef
        eta_s = 1e-5
      dmp3: Damping "SiO2_damping" (disabled) on no domains
        DampingType = IsotropicLossFactor
        eta_s_mat = userdef
        eta_s = 3e-5
    free1: Free (default)
    init1: init "Initial Values 1" (default)
    fix1: Fixed "Fixed Constraint 1" on boundaries 88

Mesh
  mesh1 "Mesh 1" (physics-controlled)
    size: MeshSizeDefault | hauto = 4

Studies
  std8 "Eigenmodes"
    eig: Eigenfrequency | neigs = 10; shift = 1[Hz]

Solver configurations
  sol310 "Solution 310" (study std8)
    v1: Variables "Dependent Variables 1"
      comp1_material_disp: Field "Material mesh displacement (comp1.material.disp)"
        scalemethod = manual
        scaleval = 2.74299586999e-07
    e1: Eigenvalue "Eigenvalue Solver 1"
      transform = eigenfrequency
      neigs = 10
      shift = 1[Hz]
      eigvfunscale = maximum
      eigvfunscaleparam = 1.73e-09
      dDef: Direct

Datasets
  dset1: Solution "Eigenmodes" | solution = sol310

Derived values
  gev1: Global "Interpolation 1" | data = dset1; expr = pesdestal_h
  eva1: Eval "Evaluation 1" on all domains | data = dset1; expr = pesdestal_h

Evaluation groups
  eg1: EvaluationGroup "Eigenfrequency"
    data = dset1
    filename = C:\Users\ruihe\OneDrive - UBC\Documents\ENPH_4\T2\ENPH459\shit123.txt
    gev1: EvalGlobal "Global Evaluation 1" | expr = {disk_t, pedestal_h}; unit = {µm, µm}

Plots
  pg1: PlotGroup3D "Mode Shapes" | data = dset1
    surf1: Surface | expr = solid.disp
      def1: Deform "Deformation 1" | expr = {u, v, w}

Exports
  anim1: Animation "Labeled" | type = imageseq; framesel = all; width = 200*3.3; height = 200*2.5; synchronize = off
  anim2: Animation "Unlabeled" | type = imageseq; framesel = all; width = 200*3.3; height = 200*2.5; synchronize = off
  anim3: Animation
    giffilename = C:\Users\ruihe\OneDrive - UBC\Documents\ENPH_4\T2\ENPH459\sdisk59_dylan_m4.gif
    sweeptype = dde
    maxframes = 11
    iterations = 5
  tbl1: Table | source = evaluationgroup; filename = ./Shit2.txt